# OpenSim document version 40600
Model pendulum:
  gravity: 0 -9.81 0
  Ground:
    Brick ground_geom_1: half_lengths=(0.1 0.01 0.1)
  BodySet:
    Body head: mass=16 [kg] mass_center=(0 0 0) inertia=(0.01 0.01 0.01 0 0 0)
      Sphere head_geom_1: radius=0.05
  JointSet:
    PinJoint head_joint: socket_parent_frame=ground_offset socket_child_frame=head_offset
      Coordinate q: default_value=0 default_speed_value=0.8726646
      PhysicalOffsetFrame ground_offset: socket_parent=/ground translation=(0 0 0) [meters]
      PhysicalOffsetFrame head_offset: socket_parent=/bodyset/head translation=(0 0.4 0)
        PhysicalOffsetFrame head_offset_offsetframe: socket_parent=.. translation=(0 -0.2 0)
          Cylinder head_offset_offsetframe_geom_1: radius=0.01 half_height=0.2
  ControllerSet:
    PrescribedController controller: socket_actuators=/forceset/torque
      FunctionSet ControlFunctions: Constant(value=0)
  ForceSet:
    CoordinateActuator torque: min_control=-1000000 max_control=1000000 coordinate=q optimal_force=1
