# OpenSim document version 40600
Model pendulum:
  gravity: 0 -9.81 0
  Ground
  BodySet:
    Body head: mass=16 [kg] mass_center=(0 0 0) inertia=(0.01 0.01 0.01 0 0 0)
  JointSet:
    PinJoint head_joint: socket_parent_frame=ground_offset socket_child_frame=head_offset
      Coordinate q: default_value=0
      PhysicalOffsetFrame ground_offset: socket_parent=/ground translation=(0 0 0) [meters]
      PhysicalOffsetFrame head_offset: socket_parent=/bodyset/head translation=(0 0.4 0)
  ControllerSet:
    PrescribedController controller: socket_actuators=/forceset/torque
      FunctionSet ControlFunctions: Constant(value=0)
  ForceSet:
    CoordinateActuator torque: min_control=-1000000 max_control=1000000 coordinate=q optimal_force=1
