# OpenSim document version 40600
Model pendulum:
  gravity: 0 -9.81 0
  Ground:
    Brick ground_geom_1: half_lengths=(0.1 0.005 0.1)
  BodySet:
    Body head: mass=16 [kg] mass_center=(0 0 0) inertia=(0.01 0.01 0.01 0 0 0)
      Sphere head_geom_1: radius=0.05
  JointSet:
    PinJoint hinge: socket_parent_frame=ground_offset socket_child_frame=head_offset
      Coordinate q_state: default_value=1 range=(-3.141593 3.141593)
      PhysicalOffsetFrame ground_offset: socket_parent=/ground translation=(0 0 0) [meters]
          orientation=(0 0 1) [radians]
      PhysicalOffsetFrame head_offset: socket_parent=/bodyset/head translation=(0 0.4 0) orientation=(0 0 1)
  ControllerSet:
    PrescribedController torque_controller: socket_actuators=/forceset/input_torque
      FunctionSet ControlFunctions: torque=Constant(value=0)
  ForceSet:
    CoordinateActuator: coordinate=q_state
    CoordinateActuator input_torque: min_control=-100 max_control=100 coordinate=q_state optimal_force=1
