# OpenSim document version 40600
Model:
  Ground
  BodySet:
    Body pendulum_base: mass=1 [kg] mass_center=(0 0 0) inertia=(1 1 1 0 0 0)
      Brick pendulum_base_geom_1: half_lengths=(0.2 0.01 0.2)
    Body pendulum_head: mass=1 mass_center=(0 0 0) inertia=(1 1 1 0 0 0)
      Sphere pendulum_head_geom_1: radius=0.05
    Body wall: mass=1 mass_center=(0 0 0) inertia=(1 1 1 0 0 0)
      Brick wall_geom_1: half_lengths=(0.01 0.1 0.1)
  JointSet:
    WeldJoint pendulum_base_to_ground: socket_parent_frame=ground_offset socket_child_frame=pendulum_base_offset
      PhysicalOffsetFrame ground_offset: socket_parent=/ground translation=(0 1 0) [meters]
      PhysicalOffsetFrame pendulum_base_offset: socket_parent=/bodyset/pendulum_base
    PinJoint pendulum_head_to_pendulum_base: socket_parent_frame=pendulum_base_offset
        socket_child_frame=pendulum_head_offset
      Coordinate rz: default_value=1
      PhysicalOffsetFrame pendulum_base_offset: socket_parent=/bodyset/pendulum_base
      PhysicalOffsetFrame pendulum_head_offset: socket_parent=/bodyset/pendulum_head translation=(0 0.5 0)
        PhysicalOffsetFrame pendulum_head_offset_offsetframe: socket_parent=.. translation=(0 -0.25 0)
          Cylinder pendulum_head_offset_offsetframe_geom_1: radius=0.01 half_height=0.25
    WeldJoint pendulum_base_to_wall: socket_parent_frame=pendulum_base_offset socket_child_frame=wall_offset
      PhysicalOffsetFrame pendulum_base_offset: socket_parent=/bodyset/pendulum_base
      PhysicalOffsetFrame wall_offset: socket_parent=/bodyset/wall translation=(0.01 0.5 0)
  ForceSet:
    HuntCrossleyForce:
      ContactParametersSet contact_parameters:
        ContactParameters: geometry=(wall_contact head_wall_contact) stiffness=100000000 dissipation=0.5
            static_friction=0.9 dynamic_friction=0.9 viscous_friction=0.6
  ContactGeometrySet:
    ContactHalfSpace wall_contact: socket_frame=/bodyset/pendulum_base location=(0 -0.5 0) orientation=(0 0 3.141593)
    ContactSphere head_wall_contact: socket_frame=/bodyset/pendulum_head radius=0.05
