# OpenSim document version 40600
Model torque_example:
  gravity: 0 -9.81 0
  Ground:
    Brick ground_geom_1: half_lengths=(0.1 0.1 0.1)
    Cylinder ground_geom_2: radius=0.075 half_height=0.1
  BodySet:
    Body head: mass=1 [kg] mass_center=(0 0 0) inertia=(0.1 0.1 0.1 0 0 0)
      PhysicalOffsetFrame head_offsetframe: socket_parent=.. translation=(0.5 0 0) [meters]
          orientation=(1.570796 0 1.570796) [radians]
        Cylinder head_offsetframe_geom_1: radius=0.025 half_height=0.5
      Sphere head_geom_1: radius=0.1
  JointSet:
    PinJoint head_joint: socket_parent_frame=ground_offset socket_child_frame=head_offset
      Coordinate q: default_value=0
      PhysicalOffsetFrame ground_offset: socket_parent=/ground translation=(0 0 0) orientation=(1.570796 0 0)
      PhysicalOffsetFrame head_offset: socket_parent=/bodyset/head translation=(1 0 0)
  ControllerSet:
    PrescribedController controller: socket_actuators=/forceset/torque
      FunctionSet ControlFunctions: Constant(value=0)
  ForceSet:
    CoordinateActuator torque: min_control=-1000000 max_control=1000000 coordinate=q optimal_force=1
