# OpenSim document version 40600
Model opensim_pendulum:
  gravity: 0 -9.81 0
  Ground
  BodySet:
    Body pendulum_base: mass=1 [kg] mass_center=(0 0 0) inertia=(0 0 0 0 0 0)
      Brick pendulum_base_geom_1: half_lengths=(0.1 0.01 0.1)
    Body pendulum_head: mass=41.7037 mass_center=(0 0 0) inertia=(0 0 3.610372 0 0 0)
      PhysicalOffsetFrame head_of: socket_parent=.. translation=(0 0.3027514 0) [meters]
        Cylinder head_of_geom_1: radius=0.01 half_height=0.3027514
      Sphere pendulum_head_geom_1: radius=0.025
  JointSet:
    WeldJoint base_to_ground: socket_parent_frame=ground_offset socket_child_frame=pendulum_base_offset
      PhysicalOffsetFrame ground_offset: socket_parent=/ground translation=(0 0.7266034 0)
      PhysicalOffsetFrame pendulum_base_offset: socket_parent=/bodyset/pendulum_base translation=(0 0 0)
    PinJoint head_to_base: socket_parent_frame=pendulum_base_offset socket_child_frame=pendulum_head_offset
      Coordinate q: default_value=1.570796
      PhysicalOffsetFrame pendulum_base_offset: socket_parent=/bodyset/pendulum_base translation=(0 0 0)
      PhysicalOffsetFrame pendulum_head_offset: socket_parent=/bodyset/pendulum_head translation=(0 0.6055028 0)
  ForceSet:
    CoordinateActuator torque: min_control=-1000000 max_control=1000000 coordinate=q optimal_force=1
    HuntCrossleyForce contact_force:
      ContactParametersSet contact_parameters:
        ContactParameters: geometry=(wall_contact head_contact) stiffness=1000000000000 dissipation=0 static_friction=0
            dynamic_friction=0 viscous_friction=0
  ContactGeometrySet:
    ContactSphere head_contact: socket_frame=/bodyset/pendulum_head radius=0.025
    ContactHalfSpace wall_contact: socket_frame=/bodyset/pendulum_base location=(-0.025 0 0) orientation=(0 3.141593 0)
